# Gearbox Design Project
# Lastname, Firstname A00000000
# Lastname, Firstname A00000000
# Lastname, Firstname A00000000
# Lastname, Firstname A00000000
# Lastname, Firstname A00000000
# This project is to design a gearbox to transmit power in a motor-jet axial compressor application. This team used AISI 1030 HR steel in the shaft, TODO: ADD MORE HERE
# NOTE!!!!: THE FINAL VERSION OF THIS DOCUMENT WILL HAVE TABLES OF THE CALCULATIONS AND SUCH FOR THE FIRST FEW PAGES, THEN IT WILL PRESENT THE FULL CALCULATIONS
# CAD drawing goes here
# Shaft Analysis Points
# Input Shaft
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# Output Shaft
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# Problem Specifications
# Properties of AISI 1030 HR
S_ult := 68 ksi  # Ultimate Tensile Strength
S_Y := 37.5 ksi  # Yield Strength
# Input Speed
n_g := 6700 rpm
# Output Speed
n_p := 20000 rpm
# Pre-Defined Gear Properties
phi_n := 20 deg  # Normal Pressure Angle
psi_helix := 30 deg  # Helix Angle
# Gear ratio, diameter, and transmitted force
# eqs
# 13-19
#
# 13-22
#
# 13-23
#
# table 13-2
#
# 13-18
#
# 13-1
# Reaction Forces on Output Shaft
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# Previous Calculations
Wt := 296.236421421 lbf
phit := 22.7958772589*deg
psi := 30*deg
d_p := 3.17542648054 in
# Component vectors of Wt (eq 13-40)
Wr32 := tan(phit)*Wt = 124.501 lbf
Wa32 := -tan(psi)*Wt = -171.032 lbf
# Assuming axial force points toward left (thus negative)
# Sum of forces in axial direction
RCx := -Wa32 = 171.032 lbf
# Sum of moments in about the z-axis at the point C
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Mr32 := (2/2 + .5 + .75/2)*in*Wr32 = 233.44 lbf*in
Ma32 := d_p/2*Wa32 = -271.55 lbf*in
RDy := (Mr32 + Ma32)/((.75/2 + .5 + 2 + .5 + .75/2) in) = -10.1627 lbf
# Sum of forces in radial direction
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RCy := -Wr32 - RDy = -114.339 lbf
# The reaction forces on the output shaft are:
RCx = 171.032 lbf
RCy = -114.339 lbf
RDy = -10.1627 lbf  # (- means downward)
# Reaction Forces on Input Shaft
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# Previous Calculations
Wt = 296.236 lbf
phit = 22.7959 deg
psi = 30 deg
d_g := 9.52627944163 in
# Component vectors of Wt (eq 13-40)
Wr23 := tan(phit)*Wt = 124.501 lbf
Wa23 := tan(psi)*Wt = 171.032 lbf
# Assuming axial force points toward left (thus negative)
# Sum of forces in axial direction
RBx := -Wa23 = -171.032 lbf
# Sum of moments in radial direction about the point B
Mr23 := (2/2 + .5 + .75/2)*in*Wr23 = 233.44 lbf*in
Ma23 := d_g/2*Wa23 = 814.65 lbf*in
RAy := (-Mr23 - Ma23)/((.75/2 + .5 + 2 + .5 + .75/2) in) = -279.491 lbf
# Sum of forces in radial direction
RBy := -Wr32 - RAy = 154.989 lbf
# The reaction forces on the output shaft are:
RBx = -171.032 lbf
RBy = 154.989 lbf
RAy = -279.491 lbf  # (- means downward)
# AGMA Coefficients
# Shaft Point Analysis
